*Heading
Axisymmetric bursting drop
**
** This input file is for the simulation of the electrovacitation instability
**    undergone by a conducting drop in a dielectric elastomeric matrix.
**    It is to be used with uel_ViscoDielectric_Public.for.
**
** UNITS:  Length - meters, Time - sec, Angle - radians,
**	   Force - Newtons, Stress - Newton/meter^2 = Pa,
**	   Mass - kilograms, Density - kg/meter^3, Energy - Joules
**
** The electrical units are chosen so that the permittivity is unity.
**
** To interpret the simulated electric potential in volts for a real material:
**
**       real potential = simulated potential/sqrt(real permittivity)
**
** To interpret the simulated charge in coulombs for a real material:
**
**       real charge = simulated charge*sqrt(real permittivity))
**
** REDUCED INTEGRATION: In order to use reduced integration three
**     changes should be made:
**
**     1. In the '*User element' command, Variables should be changed
**        from 36 to 9.
**     2. The element type of the dummy mesh should be changed
**        from CAX4 to CAX4R.
**     3. In the Material Definition section of this input file,
**        the '*Hourglass Stiffness' command and subsequent line
**        should be uncommented.
**     4. In the UEL subroutine, nInt should be set to 1.
**
** DISPLACEMENT STEP RESTRICTION: To specify the maximum allowable
**     displacement increment in terms of a fraction of the element
**     size, set the parameter maxDisp in the UEL subroutine.  For
**     the bursting simulations, maxDisp=0.25 was used.
**
** Shuolun Wang, November 2015
**
************************************************************************
**			PARAMETERS
************************************************************************
**
*Parameter
** Initial total height (taken directly from the mesh)
H0 = 100.0
**
** Initial bubble radius (taken directly from the mesh)
R0 = 0.5
**
** Shear modulus (Pa)
Gshr = 15.36e3
**
** locking stretch (set less than zero for neoHookean)
lamL = 5.99
**
** Bulk modulus (Pa)
Kblk = 1000.0*Gshr
**
** Number of nonequilibrium viscous mechanisms
nVisco = 3
**
** Number of local SDVs
nlSdv = 6*nVisco
**
** Nonequilibrium shear modulli, you need nVisco of them (Pa)
G1 = 26.53e3
G2 = 10.83e3
G3 = 26.06e3
**
** Maxwell element relaxation time, you need nVisco of them (sec)
tau1 = 6.56
tau2 = 61.25
tau3 = 0.6074
**
** total props and jprops
nProps = 4 + nVisco*2
nJProps = 3
**
** number of volume integration points
nInt = 4
**
** total of local SDV's per element
nVars = nlSdv*nInt
**
** Permittivity (arbitrary units)
permit = 1.0
**
** Normalized referential electric field (dimensionless)
phi_norm = 1.0
**
** Final potential
phi = sqrt(Gshr/permit)*(H0*phi_norm)
halfPhi = phi/2.0
**
** Normalized surface tension (elasto-capillary number)
gamma_norm = 0.1
**
** Surface tension (N/m)
gamma = gamma_norm*Gshr*R0
**
** rate for prescribing the normalized potential (per second)
rate = 1.e-5
**
** ramp time for the potential (seconds)
tRamp = phi_norm/rate
**
** Hourglass stiffness (Pa)
Ghour = 0.005*Gshr
**
** Interval time (s)
tInt = tRamp/20
**
dtInit = tInt/4.0
dtMin = 1e-12
dtMax = tInt/2.0
**
**
************************************************************************
**			MODEL DEFINITION
************************************************************************
**
** Nodes
**
*Node, nset=nall
      1,           0.,   4.64194679
      2,   2.64194703,           2.
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**
**
** Elements
**
*User Element,Nodes=4,Type=U2,Iproperties=<nJProps>,Properties=<nProps>,Coordinates=2,Variables=<nVars>,Unsymm
1,2,11
*Element, type=U2, elset=elall
1,   12, 2398, 1015,   11
   2, 2595,   20,   21, 1018
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*System
**
** Make the dummy mesh, shares nodes with the real mesh,
**  allows visualization of the results, access to
**  hourglass controls, and access to mechanical,
**  traction-type boundary conditions
**
*Element, type=CAX4H, elset=eldummy
10001,12,2398,1015,11
10002,2595,20,21,1018
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*Nset, nset=Dielectric-1_top
   6,   7, 207, 208, 209, 210
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*Nset, nset=TopRight
6
*Elset, elset=Dielectric-1_top
   34,   35,   36,   37,  419,  433
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*Nset, nset=Dielectric-1_bottom
   4,   5, 134, 135, 136, 137
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*Nset, nset=BottomRight
5
*Elset, elset=Dielectric-1_bottom
  100,  101,  102,  120,  121,  135
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*Nset, nset=Dielectric-1_right
   5,   6, 158, 159, 160, 161
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*Elset, elset=Dielectric-1_right
   19,   20,   21,   22,   67,   68
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*Nset, nset=Dielectric-1_left
   1,   3,   4,   7,   8,  10
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*Elset, elset=Dielectric-1_left
   86,   88,   90,   92,   93,   94
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*Nset, nset=Dielectric-1_cav
   8,   9,  10, 305, 306, 307
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*Nset, nset=most
   9,  10, 305, 306, 307, 308
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*Nset, nset=Dielectric-1_toptip
 8,
*Nset, nset=Dielectric-1_bottomtip
 10,
*Nset, nset=RightMiddle
182
*Nset, nset=Dielectric-1_Zoom
    1,    2,    3,    8,    9,   10
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*Elset, elset=Dielectric-1_Zoom, generate
 2955,  7954,     1
*Elset, elset=ZoomDummy, generate
 12955, 17954,    1
**
** Cavity surface
**
*Elset, elset=elcav, generate
 3004,  7954,    50
*Elset, elset=elCavDum, generate
 13004, 17954,   50
*Surface, type=ELEMENT, name=surfCav
elCavDum, S2
**
** Reference node for imposing fluid-filled cavity and constraint
**
*Node, nset=nCav
99998, 0.0, 2.0, 0.0
**
** Make a dummy element which is not connected to anything with CAX4T
**  just so that we can have the coupled thermal-displacement
**
*Node
999996,  0.0, 0.0
999997,  .00001, 0.0
999998,  .00001, .00001
999999,  0.0, .00001
*Nset, nset=tempElement
999996,999997,999998,999999
*Element, Type=CAX4T
999999,999996,999997,999998,999999
*Elset,elset=tempElement
999999
************************************************************************
**			MATERIAL DEFINITION
************************************************************************
**
** Material properties for the real material
**
*uel property,elset=elall
*******************************************************************
**Gshr	lamL	Kblk	permit		Gneq	tau	Gneq	tau
<Gshr>,	<lamL>,	<Kblk>,	<permit>,	<G1>,	<tau1>,	<G2>,	<tau2>,
**
**Gneq	tau	nVisco		nlSdv		nInt
<G3>,	<tau3>,	<nVisco>,	<nlSdv>,	<nInt>
**
*******************************************************************
**
** Dummy mesh material properties
**
*Solid section, elset=ElDummy, material=Material-1
***Hourglass stiffness
**<Ghour>
*Solid section, elset=tempElement, material=Material-2
**
*Material, name=Material-1
** The dummy mesh stiffness is very small
*Elastic
1.e-20
*Density
1.0
*User output variables
1
**
*Material, name=Material-2
*Elastic
1.e-20
*Conductivity
1.0
*Density
1.0
*Specific heat
1.0
**
************************************************************************
**			INITIAL CONDITIONS
************************************************************************
*Initial conditions, type=temperature
nall, 0.0
tempElement, 0.0
**
************************************************************************
**			BOUNDARY CONDITIONS
************************************************************************
** use an equation to keep the potential the same all along the surface
**  of the conductive liquid to solid surface. This equation should be
**  commented out to model a non-conductive drop
*Equation
2
most,11,1.0,8,11,-1.0
**
************************************************************************
**			   AMPLITUDE
************************************************************************
*Amplitude, name=Amp-1
0.0,0.0,<tRamp>,1.0
*Amplitude, name=Amp-2
0.0,1.0,<tRamp>,1.0
*Amplitude, name=Amp-3
0.0,1.0,<tRamp>,0.0
************************************************************************
**		     FLUID CAVITY BEHAVIOR
************************************************************************
*Fluid Behavior, name=IntProp-1
*Fluid Density
1000.
*Fluid Bulk Modulus
1365000000000
************************************************************************
**			  FLUID CAVITY
************************************************************************
*Fluid Cavity, name=Int-1, behavior=IntProp-1, refnode=nCav, surface=surfCav

************************************************************************
**			STEP DEFINITION
************************************************************************
*Step, Name=Actuate, nlgeom=yes, unsymm=yes, inc=50000
*Coupled temperature-displacement, deltmx=100000.0
<dtInit>,<tRamp>,<dtMin>,<dtMax>
*Controls, parameters=line search
10,1.0,0.0001,0.25,0.10
*Controls, parameters=time incrementation
,,,,,,,20,,,,,,
**
*Boundary
Dielectric-1_bottom, YSYMM
Dielectric-1_left, XSYMM
Dielectric-1_right, XSYMM
Dielectric-1_top, YSYMM
**
*Boundary, amplitude=Amp-1
Dielectric-1_top,11,11,<halfPhi>
Dielectric-1_bottom,11,11,-<halfPhi>
RightMiddle,11,11,0.0
**
*Dload, amplitude=Amp-2
elCav,U12,<gamma>
**
*Boundary
tempElement,encastre
tempElement,11,11,0.0
**
**
*Output, field, time interval=<tInt>
*node output, nset=nall
u,nt
*node output, nset=tempElement
u
*node output, nset=nCav
u
*Element output, elset=ElDummy
le,uvarm
**
*Output, history, frequency=1
*node output, nset=Dielectric-1_toptip
u2,nt11
*node output, nset=BottomRight
nt11
*node output, nset=TopRight
nt11
**node Output, nset=nCav
**cvol, pcav
**
*End Step
************************************************************************
*Step, Name=Unloading, nlgeom=yes, unsymm=yes, inc=50000
*Coupled temperature-displacement, deltmx=100000.0
<dtInit>,<tRamp>,<dtMin>,<dtMax>
*Controls, parameters=line search
10,1.0,0.0001,0.25,0.10
*Controls, parameters=time incrementation
,,,,,,,20,,,,,,
**
*Boundary
Dielectric-1_bottom, YSYMM
Dielectric-1_left, XSYMM
Dielectric-1_right, XSYMM
Dielectric-1_top, YSYMM
**
*Boundary, amplitude=Amp-3
Dielectric-1_top,11,11,<halfPhi>
Dielectric-1_bottom,11,11,-<halfPhi>
RightMiddle,11,11,0.0
**
*Dload, amplitude=Amp-2
elCav,U12,<gamma>
**
*Boundary
tempElement,encastre
tempElement,11,11,0.0
**
**
*Output, field, time interval=<tInt>
*node output, nset=nall
u,nt
*node output, nset=tempElement
u
*node output, nset=nCav
u
*Element output, elset=ElDummy
le,uvarm
**
*Output, history, frequency=1
*node output, nset=Dielectric-1_toptip
u2,nt11
*node output, nset=BottomRight
nt11
*node output, nset=TopRight
nt11
**node Output, nset=nCav
**cvol, pcav
**
*End Step
************************************************************************
